// SBML level 2 version 1

model MAP()

  // Compartments:
  compartment default;

  // Species:
  species G001 in default = 0; G001 is "acpS";
  species coenzyme_A in default = 0; coenzyme_A is "coenzyme-A";
  species apo_AcpM in default = 0; apo_AcpM is "apo-AcpM";
  species ADP in default = 0;
  species acyl_carrier_protein in default = 0; acyl_carrier_protein is "[acyl-carrier-protein]";
  species G002 in default = 0; G002 is "birA";
  species AccB in default = 0;
  species biotin in default = 0;
  species ATP in default = 0;
  species pyrophosphate in default = 0;
  species AMP in default = 0;
  species BCCP_biotin in default = 0; BCCP_biotin is "BCCP-biotin";
  species G003 in default = 0; G003 is "accA3";
  species HCO3 in default = 0; HCO3 is "HCO3-";
  species phosphate in default = 0;
  species BCCP_biotin_CO2 in default = 0; BCCP_biotin_CO2 is "BCCP-biotin-CO2";
  species H in default = 0; H is "H+";
  species G004 in default = 0; G004 is "accD3";
  species acetyl_CoA in default = 0; acetyl_CoA is "acetyl-CoA";
  species malonyl_CoA in default = 0; malonyl_CoA is "malonyl-CoA";
  species G005 in default = 0; G005 is "fas";
  species ACP_FAS in default = 0; ACP_FAS is "ACP-FAS";
  species C2_acyl_ACP_FAS in default = 0; C2_acyl_ACP_FAS is "C2-acyl-ACP-FAS";
  species malonyl_C2_acyl_ACP_FAS in default = 0; malonyl_C2_acyl_ACP_FAS is "malonyl-C2-acyl-ACP-FAS";
  species beta_keto_C4_acyl_ACP_FAS in default = 0; beta_keto_C4_acyl_ACP_FAS is "beta-keto-C4-acyl-ACP-FAS";
  species CO2 in default = 0;
  species NADPH in default = 0;
  species D_3_hydroxy_C4_acyl_ACP_FAS in default = 0; D_3_hydroxy_C4_acyl_ACP_FAS is "D-3-hydroxy-C4-acyl-ACP-FAS";
  species NADP in default = 0;
  species X025 in default = 0; X025 is "trans-delta-2-enoyl-C4-acyl-ACP-FAS";
  species H2O in default = 0;
  species NADH in default = 0;
  species C4_acyl_ACP_FAS in default = 0; C4_acyl_ACP_FAS is "C4-acyl-ACP-FAS";
  species NAD in default = 0;
  species malonyl_C4_acyl_ACP_FAS in default = 0; malonyl_C4_acyl_ACP_FAS is "malonyl-C4-acyl-ACP-FAS";
  species beta_keto_C6_acyl_ACP_FAS in default = 0; beta_keto_C6_acyl_ACP_FAS is "beta-keto-C6-acyl-ACP-FAS";
  species D_3_hydroxy_C6_acyl_ACP_FAS in default = 0; D_3_hydroxy_C6_acyl_ACP_FAS is "D-3-hydroxy-C6-acyl-ACP-FAS";
  species X033 in default = 0; X033 is "trans-delta-2-enoyl-C6-acyl-ACP-FAS";
  species C6_acyl_ACP_FAS in default = 0; C6_acyl_ACP_FAS is "C6-acyl-ACP-FAS";
  species malonyl_C6_acyl_ACP_FAS in default = 0; malonyl_C6_acyl_ACP_FAS is "malonyl-C6-acyl-ACP-FAS";
  species beta_keto_C8_acyl_ACP_FAS in default = 0; beta_keto_C8_acyl_ACP_FAS is "beta-keto-C8-acyl-ACP-FAS";
  species D_3_hydroxy_C8_acyl_ACP_FAS in default = 0; D_3_hydroxy_C8_acyl_ACP_FAS is "D-3-hydroxy-C8-acyl-ACP-FAS";
  species X038 in default = 0; X038 is "trans-delta-2-enoyl-C8-acyl-ACP-FAS";
  species C8_acyl_ACP_FAS in default = 0; C8_acyl_ACP_FAS is "C8-acyl-ACP-FAS";
  species malonyl_C8_acyl_ACP_FAS in default = 0; malonyl_C8_acyl_ACP_FAS is "malonyl-C8-acyl-ACP-FAS";
  species beta_keto_C10_acyl_ACP_FAS in default = 0; beta_keto_C10_acyl_ACP_FAS is "beta-keto-C10-acyl-ACP-FAS";
  species D_3_hydroxy_C10_acyl_ACP_FAS in default = 0; D_3_hydroxy_C10_acyl_ACP_FAS is "D-3-hydroxy-C10-acyl-ACP-FAS";
  species X043 in default = 0; X043 is "trans-delta-2-enoyl-C10-acyl-ACP-FAS";
  species C10_acyl_ACP_FAS in default = 0; C10_acyl_ACP_FAS is "C10-acyl-ACP-FAS";
  species malonyl_C10_acyl_ACP_FAS in default = 0; malonyl_C10_acyl_ACP_FAS is "malonyl-C10-acyl-ACP-FAS";
  species beta_keto_C12_acyl_ACP_FAS in default = 0; beta_keto_C12_acyl_ACP_FAS is "beta-keto-C12-acyl-ACP-FAS";
  species D_3_hydroxy_C12_acyl_ACP_FAS in default = 0; D_3_hydroxy_C12_acyl_ACP_FAS is "D-3-hydroxy-C12-acyl-ACP-FAS";
  species X048 in default = 0; X048 is "trans-delta-2-enoyl-C12-acyl-ACP-FAS";
  species C12_acyl_ACP_FAS in default = 0; C12_acyl_ACP_FAS is "C12-acyl-ACP-FAS";
  species malonyl_C12_acyl_ACP_FAS in default = 0; malonyl_C12_acyl_ACP_FAS is "malonyl-C12-acyl-ACP-FAS";
  species beta_keto_C14_acyl_ACP_FAS in default = 0; beta_keto_C14_acyl_ACP_FAS is "beta-keto-C14-acyl-ACP-FAS";
  species D_3_hydroxy_C14_acyl_ACP_FAS in default = 0; D_3_hydroxy_C14_acyl_ACP_FAS is "D-3-hydroxy-C14-acyl-ACP-FAS";
  species X053 in default = 0; X053 is "trans-delta-2-enoyl-C14-acyl-ACP-FAS";
  species C14_acyl_ACP_FAS in default = 0; C14_acyl_ACP_FAS is "C14-acyl-ACP-FAS";
  species malonyl_C14_acyl_ACP_FAS in default = 0; malonyl_C14_acyl_ACP_FAS is "malonyl-C14-acyl-ACP-FAS";
  species beta_keto_C16_acyl_ACP_FAS in default = 0; beta_keto_C16_acyl_ACP_FAS is "beta-keto-C16-acyl-ACP-FAS";
  species D_3_hydroxy_C16_acyl_ACP_FAS in default = 0; D_3_hydroxy_C16_acyl_ACP_FAS is "D-3-hydroxy-C16-acyl-ACP-FAS";
  species X058 in default = 0; X058 is "trans-delta-2-enoyl-C16-acyl-ACP-FAS";
  species C16_acyl_ACP_FAS in default = 0; C16_acyl_ACP_FAS is "C16-acyl-ACP-FAS";
  species malonyl_C16_acyl_ACP_FAS in default = 0; malonyl_C16_acyl_ACP_FAS is "malonyl-C16-acyl-ACP-FAS";
  species beta_keto_C18_acyl_ACP_FAS in default = 0; beta_keto_C18_acyl_ACP_FAS is "beta-keto-C18-acyl-ACP-FAS";
  species D_3_hydroxy_C18_acyl_ACP_FAS in default = 0; D_3_hydroxy_C18_acyl_ACP_FAS is "D-3-hydroxy-C18-acyl-ACP-FAS";
  species X063 in default = 0; X063 is "trans-delta-2-enoyl-C18-acyl-ACP-FAS";
  species C18_acyl_ACP_FAS in default = 0; C18_acyl_ACP_FAS is "C18-acyl-ACP-FAS";
  species malonyl_C18_acyl_ACP_FAS in default = 0; malonyl_C18_acyl_ACP_FAS is "malonyl-C18-acyl-ACP-FAS";
  species beta_keto_C20_acyl_ACP_FAS in default = 0; beta_keto_C20_acyl_ACP_FAS is "beta-keto-C20-acyl-ACP-FAS";
  species D_3_hydroxy_C20_acyl_ACP_FAS in default = 0; D_3_hydroxy_C20_acyl_ACP_FAS is "D-3-hydroxy-C20-acyl-ACP-FAS";
  species X068 in default = 0; X068 is "trans-delta-2-enoyl-C20-acyl-ACP-FAS";
  species C20_acyl_ACP_FAS in default = 0; C20_acyl_ACP_FAS is "C20-acyl-ACP-FAS";
  species malonyl_C20_acyl_ACP_FAS in default = 0; malonyl_C20_acyl_ACP_FAS is "malonyl-C20-acyl-ACP-FAS";
  species beta_keto_C22_acyl_ACP_FAS in default = 0; beta_keto_C22_acyl_ACP_FAS is "beta-keto-C22-acyl-ACP-FAS";
  species D_3_hydroxy_C22_acyl_ACP_FAS in default = 0; D_3_hydroxy_C22_acyl_ACP_FAS is "D-3-hydroxy-C22-acyl-ACP-FAS";
  species X073 in default = 0; X073 is "trans-delta-2-enoyl-C22-acyl-ACP-FAS";
  species C22_acyl_ACP_FAS in default = 0; C22_acyl_ACP_FAS is "C22-acyl-ACP-FAS";
  species malonyl_C22_acyl_ACP_FAS in default = 0; malonyl_C22_acyl_ACP_FAS is "malonyl-C22-acyl-ACP-FAS";
  species beta_keto_C24_acyl_ACP_FAS in default = 0; beta_keto_C24_acyl_ACP_FAS is "beta-keto-C24-acyl-ACP-FAS";
  species D_3_hydroxy_C24_acyl_ACP_FAS in default = 0; D_3_hydroxy_C24_acyl_ACP_FAS is "D-3-hydroxy-C24-acyl-ACP-FAS";
  species X078 in default = 0; X078 is "trans-delta-2-enoyl-C24-acyl-ACP-FAS";
  species C24_acyl_ACP_FAS in default = 0; C24_acyl_ACP_FAS is "C24-acyl-ACP-FAS";
  species C24_acyl_S_CoA in default = 0; C24_acyl_S_CoA is "C24-acyl-S-CoA";
  species C16_acyl_S_CoA in default = 0; C16_acyl_S_CoA is "C16-acyl-S-CoA";
  species G006 in default = 0; G006 is "fabD";
  species malonyl_ACP in default = 0; malonyl_ACP is "malonyl-ACP";
  species G007 in default = 0; G007 is "fabH";
  species beta_keto_C18_acyl_ACP in default = 0; beta_keto_C18_acyl_ACP is "beta-keto-C18-acyl-ACP";
  species G008 in default = 0; G008 is "fabG1/mabA";
  species D_3_hydroxy_C18_acyl_ACP in default = 0; D_3_hydroxy_C18_acyl_ACP is "D-3-hydroxy-C18-acyl-ACP";
  species G009 in default = 0; G009 is "fabG2";
  species G010 in default = 0; G010 is "fabG4";
  species G011 in default = 0; G011 is "unk1";
  species trans_delta_2_enoyl_C18_acyl_ACP in default = 0; trans_delta_2_enoyl_C18_acyl_ACP is "trans-delta-2-enoyl-C18-acyl-ACP";
  species G012 in default = 0; G012 is "inhA";
  species C18_acyl_ACP in default = 0; C18_acyl_ACP is "C18-acyl-ACP";
  species G013 in default = 0; G013 is "kasA";
  species G014 in default = 0; G014 is "kasB";
  species beta_keto_C20_acyl_ACP in default = 0; beta_keto_C20_acyl_ACP is "beta-keto-C20-acyl-ACP";
  species D_3_hydroxy_C20_acyl_ACP in default = 0; D_3_hydroxy_C20_acyl_ACP is "D-3-hydroxy-C20-acyl-ACP";
  species trans_delta_2_enoyl_C20_acyl_ACP in default = 0; trans_delta_2_enoyl_C20_acyl_ACP is "trans-delta-2-enoyl-C20-acyl-ACP";
  species C20_acyl_ACP in default = 0; C20_acyl_ACP is "C20-acyl-ACP";
  species beta_keto_C22_acyl_ACP in default = 0; beta_keto_C22_acyl_ACP is "beta-keto-C22-acyl-ACP";
  species D_3_hydroxy_C22_acyl_ACP in default = 0; D_3_hydroxy_C22_acyl_ACP is "D-3-hydroxy-C22-acyl-ACP";
  species trans_delta_2_enoyl_C22_acyl_ACP in default = 0; trans_delta_2_enoyl_C22_acyl_ACP is "trans-delta-2-enoyl-C22-acyl-ACP";
  species C22_acyl_ACP in default = 0; C22_acyl_ACP is "C22-acyl-ACP";
  species beta_keto_C24_acyl_ACP in default = 0; beta_keto_C24_acyl_ACP is "beta-keto-C24-acyl-ACP";
  species D_3_hydroxy_C24_acyl_ACP in default = 0; D_3_hydroxy_C24_acyl_ACP is "D-3-hydroxy-C24-acyl-ACP";
  species trans_delta_2_enoyl_C24_acyl_ACP in default = 0; trans_delta_2_enoyl_C24_acyl_ACP is "trans-delta-2-enoyl-C24-acyl-ACP";
  species C24_acyl_ACP in default = 0; C24_acyl_ACP is "C24-acyl-ACP";
  species beta_keto_C26_acyl_ACP in default = 0; beta_keto_C26_acyl_ACP is "beta-keto-C26-acyl-ACP";
  species D_3_hydroxy_C26_acyl_ACP in default = 0; D_3_hydroxy_C26_acyl_ACP is "D-3-hydroxy-C26-acyl-ACP";
  species trans_delta_2_enoyl_C26_acyl_ACP in default = 0; trans_delta_2_enoyl_C26_acyl_ACP is "trans-delta-2-enoyl-C26-acyl-ACP";
  species C26_acyl_ACP in default = 0; C26_acyl_ACP is "C26-acyl-ACP";
  species beta_keto_C28_acyl_ACP in default = 0; beta_keto_C28_acyl_ACP is "beta-keto-C28-acyl-ACP";
  species D_3_hydroxy_C28_acyl_ACP in default = 0; D_3_hydroxy_C28_acyl_ACP is "D-3-hydroxy-C28-acyl-ACP";
  species trans_delta_2_enoyl_C28_acyl_ACP in default = 0; trans_delta_2_enoyl_C28_acyl_ACP is "trans-delta-2-enoyl-C28-acyl-ACP";
  species C28_acyl_ACP in default = 0; C28_acyl_ACP is "C28-acyl-ACP";
  species beta_keto_C30_acyl_ACP in default = 0; beta_keto_C30_acyl_ACP is "beta-keto-C30-acyl-ACP";
  species D_3_hydroxy_C30_acyl_ACP in default = 0; D_3_hydroxy_C30_acyl_ACP is "D-3-hydroxy-C30-acyl-ACP";
  species trans_delta_2_enoyl_C30_acyl_ACP in default = 0; trans_delta_2_enoyl_C30_acyl_ACP is "trans-delta-2-enoyl-C30-acyl-ACP";
  species C30_acyl_ACP in default = 0; C30_acyl_ACP is "C30-acyl-ACP";
  species beta_keto_C32_acyl_ACP in default = 0; beta_keto_C32_acyl_ACP is "beta-keto-C32-acyl-ACP";
  species D_3_hydroxy_C32_acyl_ACP in default = 0; D_3_hydroxy_C32_acyl_ACP is "D-3-hydroxy-C32-acyl-ACP";
  species trans_delta_2_enoyl_C32_acyl_ACP in default = 0; trans_delta_2_enoyl_C32_acyl_ACP is "trans-delta-2-enoyl-C32-acyl-ACP";
  species C32_acyl_ACP in default = 0; C32_acyl_ACP is "C32-acyl-ACP";
  species beta_keto_C34_acyl_ACP in default = 0; beta_keto_C34_acyl_ACP is "beta-keto-C34-acyl-ACP";
  species D_3_hydroxy_C34_acyl_ACP in default = 0; D_3_hydroxy_C34_acyl_ACP is "D-3-hydroxy-C34-acyl-ACP";
  species trans_delta_2_enoyl_C34_acyl_ACP in default = 0; trans_delta_2_enoyl_C34_acyl_ACP is "trans-delta-2-enoyl-C34-acyl-ACP";
  species C34_acyl_ACP in default = 0; C34_acyl_ACP is "C34-acyl-ACP";
  species beta_keto_C36_acyl_ACP in default = 0; beta_keto_C36_acyl_ACP is "beta-keto-C36-acyl-ACP";
  species D_3_hydroxy_C36_acyl_ACP in default = 0; D_3_hydroxy_C36_acyl_ACP is "D-3-hydroxy-C36-acyl-ACP";
  species trans_delta_2_enoyl_C36_acyl_ACP in default = 0; trans_delta_2_enoyl_C36_acyl_ACP is "trans-delta-2-enoyl-C36-acyl-ACP";
  species C36_acyl_ACP in default = 0; C36_acyl_ACP is "C36-acyl-ACP";
  species beta_keto_C38_acyl_ACP in default = 0; beta_keto_C38_acyl_ACP is "beta-keto-C38-acyl-ACP";
  species D_3_hydroxy_C38_acyl_ACP in default = 0; D_3_hydroxy_C38_acyl_ACP is "D-3-hydroxy-C38-acyl-ACP";
  species trans_delta_2_enoyl_C38_acyl_ACP in default = 0; trans_delta_2_enoyl_C38_acyl_ACP is "trans-delta-2-enoyl-C38-acyl-ACP";
  species C38_acyl_ACP in default = 0; C38_acyl_ACP is "C38-acyl-ACP";
  species beta_keto_C40_acyl_ACP in default = 0; beta_keto_C40_acyl_ACP is "beta-keto-C40-acyl-ACP";
  species D_3_hydroxy_C40_acyl_ACP in default = 0; D_3_hydroxy_C40_acyl_ACP is "D-3-hydroxy-C40-acyl-ACP";
  species trans_delta_2_enoyl_C40_acyl_ACP in default = 0; trans_delta_2_enoyl_C40_acyl_ACP is "trans-delta-2-enoyl-C40-acyl-ACP";
  species C40_acyl_ACP in default = 0; C40_acyl_ACP is "C40-acyl-ACP";
  species beta_keto_C42_acyl_ACP in default = 0; beta_keto_C42_acyl_ACP is "beta-keto-C42-acyl-ACP";
  species D_3_hydroxy_C42_acyl_ACP in default = 0; D_3_hydroxy_C42_acyl_ACP is "D-3-hydroxy-C42-acyl-ACP";
  species trans_delta_2_enoyl_C42_acyl_ACP in default = 0; trans_delta_2_enoyl_C42_acyl_ACP is "trans-delta-2-enoyl-C42-acyl-ACP";
  species C42_acyl_ACP in default = 0; C42_acyl_ACP is "C42-acyl-ACP";
  species beta_keto_C44_acyl_ACP in default = 0; beta_keto_C44_acyl_ACP is "beta-keto-C44-acyl-ACP";
  species D_3_hydroxy_C44_acyl_ACP in default = 0; D_3_hydroxy_C44_acyl_ACP is "D-3-hydroxy-C44-acyl-ACP";
  species trans_delta_2_enoyl_C44_acyl_ACP in default = 0; trans_delta_2_enoyl_C44_acyl_ACP is "trans-delta-2-enoyl-C44-acyl-ACP";
  species C44_acyl_ACP in default = 0; C44_acyl_ACP is "C44-acyl-ACP";
  species beta_keto_C46_acyl_ACP in default = 0; beta_keto_C46_acyl_ACP is "beta-keto-C46-acyl-ACP";
  species D_3_hydroxy_C46_acyl_ACP in default = 0; D_3_hydroxy_C46_acyl_ACP is "D-3-hydroxy-C46-acyl-ACP";
  species trans_delta_2_enoyl_C46_acyl_ACP in default = 0; trans_delta_2_enoyl_C46_acyl_ACP is "trans-delta-2-enoyl-C46-acyl-ACP";
  species C46_acyl_ACP in default = 0; C46_acyl_ACP is "C46-acyl-ACP";
  species beta_keto_C48_acyl_ACP in default = 0; beta_keto_C48_acyl_ACP is "beta-keto-C48-acyl-ACP";
  species D_3_hydroxy_C48_acyl_ACP in default = 0; D_3_hydroxy_C48_acyl_ACP is "D-3-hydroxy-C48-acyl-ACP";
  species trans_delta_2_enoyl_C48_acyl_ACP in default = 0; trans_delta_2_enoyl_C48_acyl_ACP is "trans-delta-2-enoyl-C48-acyl-ACP";
  species C48_acyl_ACP in default = 0; C48_acyl_ACP is "C48-acyl-ACP";
  species beta_keto_C50_acyl_ACP in default = 0; beta_keto_C50_acyl_ACP is "beta-keto-C50-acyl-ACP";
  species D_3_hydroxy_C50_acyl_ACP in default = 0; D_3_hydroxy_C50_acyl_ACP is "D-3-hydroxy-C50-acyl-ACP";
  species trans_delta_2_enoyl_C50_acyl_ACP in default = 0; trans_delta_2_enoyl_C50_acyl_ACP is "trans-delta-2-enoyl-C50-acyl-ACP";
  species C50_acyl_ACP in default = 0; C50_acyl_ACP is "C50-acyl-ACP";
  species beta_keto_C52_acyl_ACP in default = 0; beta_keto_C52_acyl_ACP is "beta-keto-C52-acyl-ACP";
  species D_3_hydroxy_C52_acyl_ACP in default = 0; D_3_hydroxy_C52_acyl_ACP is "D-3-hydroxy-C52-acyl-ACP";
  species trans_delta_2_enoyl_C52_acyl_ACP in default = 0; trans_delta_2_enoyl_C52_acyl_ACP is "trans-delta-2-enoyl-C52-acyl-ACP";
  species C52_acyl_ACP in default = 0; C52_acyl_ACP is "C52-acyl-ACP";
  species beta_keto_C54_acyl_ACP in default = 0; beta_keto_C54_acyl_ACP is "beta-keto-C54-acyl-ACP";
  species D_3_hydroxy_C54_acyl_ACP in default = 0; D_3_hydroxy_C54_acyl_ACP is "D-3-hydroxy-C54-acyl-ACP";
  species trans_delta_2_enoyl_C54_acyl_ACP in default = 0; trans_delta_2_enoyl_C54_acyl_ACP is "trans-delta-2-enoyl-C54-acyl-ACP";
  species C54_acyl_ACP in default = 0; C54_acyl_ACP is "C54-acyl-ACP";
  species beta_keto_C56_acyl_ACP in default = 0; beta_keto_C56_acyl_ACP is "beta-keto-C56-acyl-ACP";
  species D_3_hydroxy_C56_acyl_ACP in default = 0; D_3_hydroxy_C56_acyl_ACP is "D-3-hydroxy-C56-acyl-ACP";
  species trans_delta_2_enoyl_C56_acyl_ACP in default = 0; trans_delta_2_enoyl_C56_acyl_ACP is "trans-delta-2-enoyl-C56-acyl-ACP";
  species C56_acyl_ACP in default = 0; C56_acyl_ACP is "C56-acyl-ACP";
  species beta_keto_C58_acyl_ACP in default = 0; beta_keto_C58_acyl_ACP is "beta-keto-C58-acyl-ACP";
  species D_3_hydroxy_C58_acyl_ACP in default = 0; D_3_hydroxy_C58_acyl_ACP is "D-3-hydroxy-C58-acyl-ACP";
  species trans_delta_2_enoyl_C58_acyl_ACP in default = 0; trans_delta_2_enoyl_C58_acyl_ACP is "trans-delta-2-enoyl-C58-acyl-ACP";
  species C58_acyl_ACP in default = 0; C58_acyl_ACP is "C58-acyl-ACP";
  species G015 in default = 0; G015 is "desA1";
  species G016 in default = 0; G016 is "desA2";
  species G017 in default = 0; G017 is "desA3";
  species X167 in default = 0; X167 is "cis-delta-2-19,31-enoyl-C52-acyl-ACP";
  species X168 in default = 0; X168 is "cis-delta-2-19,37-enoyl-C54-acyl-ACP";
  species X169 in default = 0; X169 is "cis-delta-2-19,37-enoyl-C58-acyl-ACP";
  species G018 in default = 0; G018 is "mmaA2";
  species S_adenosyl_L_methionine in default = 0; S_adenosyl_L_methionine is "S-adenosyl-L-methionine";
  species X171 in default = 0; X171 is "cis-delta-1-31-enoyl-19-cp-C53-acyl-ACP";
  species S_adenosyl_L_homocysteine in default = 0; S_adenosyl_L_homocysteine is "S-adenosyl-L-homocysteine";
  species G019 in default = 0; G019 is "pcaA";
  species _19_31_cp_C54_acyl_ACP in default = 0; _19_31_cp_C54_acyl_ACP is "19,31-cp-C54-acyl-ACP";
  species G020 in default = 0; G020 is "fadD32";
  species _19_31_cp_C54_acyl_ACP_AMP in default = 0; _19_31_cp_C54_acyl_ACP_AMP is "19,31-cp-C54-acyl-ACP-AMP";
  species G021 in default = 0; G021 is "accD4";
  species G022 in default = 0; G022 is "accD5";
  species _2_carboxyl_C24_acyl_CoA in default = 0; _2_carboxyl_C24_acyl_CoA is "2-carboxyl-C24-acyl-CoA";
  species G023 in default = 0; G023 is "pks13";
  species alpha_mycolate in default = 0; alpha_mycolate is "alpha-mycolate";
  species G024 in default = 0; G024 is "mmaA4";
  species X177 in default = 0; X177 is "cis-delta-37-methyl-hydroxy-C55-acyl-ACP";
  species G025 in default = 0; G025 is "mmaA3";
  species X178 in default = 0; X178 is "cis-delta-37-methyl-hydroxymethyl-C56-acyl-ACP";
  species cis_methoxy_C57_meroacyl_cp_ACP in default = 0; cis_methoxy_C57_meroacyl_cp_ACP is "cis-methoxy-C57-meroacyl-cp-ACP";
  species G026 in default = 0; G026 is "cmaA2";
  species X180 in default = 0; X180 is "cis-methoxy-C57-meroacyl-cp-ACP-AMP";
  species cis_methoxy_mycolate in default = 0; cis_methoxy_mycolate is "cis-methoxy-mycolate";
  species G027 in default = 0; G027 is "mmaA1";
  species X182 in default = 0; X182 is "delta-2-cis-19,trans-37-enoyl-methyl-C55-acyl-ACP";
  species X183 in default = 0; X183 is "trans-delta-37-methyl-hydroxy-C56-acyl-ACP";
  species X184 in default = 0; X184 is "trans-delta-37-methyl-hydroxymethyl-C57-acyl-ACP";
  species X185 in default = 0; X185 is "trans-methoxy-C58-meroacyl-cp-ACP";
  species X186 in default = 0; X186 is "trans-methoxy-C58-meroacyl-cp-ACP-AMP";
  species trans_methoxy_mycolate in default = 0; trans_methoxy_mycolate is "trans-methoxy-mycolate";
  species X188 in default = 0; X188 is "cis-delta-37-methyl-hydroxy-C59-acyl-ACP";
  species G028 in default = 0; G028 is "unk2";
  species X189 in default = 0; X189 is "cis-delta-37-methyl-keto-C59-acyl-ACP";
  species cis_keto_C60_meroacyl_ACP in default = 0; cis_keto_C60_meroacyl_ACP is "cis-keto-C60-meroacyl-ACP";
  species cis_keto_C60_meroacyl_ACP_AMP in default = 0; cis_keto_C60_meroacyl_ACP_AMP is "cis-keto-C60-meroacyl-ACP-AMP";
  species cis_keto_mycolate in default = 0; cis_keto_mycolate is "cis-keto-mycolate";
  species X193 in default = 0; X193 is "trans-delta-37-methyl-hydroxy-C60-acyl-ACP";
  species X194 in default = 0; X194 is "trans-delta-37-methyl-keto-C60-acyl-ACP";
  species trans_keto_C61_meroacyl_ACP in default = 0; trans_keto_C61_meroacyl_ACP is "trans-keto-C61-meroacyl-ACP";
  species trans_keto_C61_meroacyl_ACP_AMP in default = 0; trans_keto_C61_meroacyl_ACP_AMP is "trans-keto-C61-meroacyl-ACP-AMP";
  species trans_keto_mycolate in default = 0; trans_keto_mycolate is "trans-keto-mycolate";

  // Reactions:
  J001: coenzyme_A + apo_AcpM => ADP + acyl_carrier_protein; 1*coenzyme_A*apo_AcpM;  // modifiers: G001
  J002: AccB + biotin + ATP => pyrophosphate + AMP + BCCP_biotin; 1*AccB*biotin*ATP;  // modifiers: G002
  J003: ATP + BCCP_biotin + HCO3 => ADP + phosphate + BCCP_biotin_CO2 + H; 1*ATP*BCCP_biotin*HCO3;  // modifiers: G003
  J004: BCCP_biotin_CO2 + acetyl_CoA => malonyl_CoA + BCCP_biotin; 1*BCCP_biotin_CO2*acetyl_CoA;  // modifiers: G004
  J005: acetyl_CoA + ACP_FAS => C2_acyl_ACP_FAS + coenzyme_A; 1*acetyl_CoA*ACP_FAS;  // modifiers: G005
  J006: C2_acyl_ACP_FAS + malonyl_CoA => malonyl_C2_acyl_ACP_FAS + coenzyme_A; 1*C2_acyl_ACP_FAS*malonyl_CoA;  // modifiers: G005
  J007: malonyl_C2_acyl_ACP_FAS => beta_keto_C4_acyl_ACP_FAS + CO2; 1*malonyl_C2_acyl_ACP_FAS;  // modifiers: G005
  J008: NADPH + beta_keto_C4_acyl_ACP_FAS => D_3_hydroxy_C4_acyl_ACP_FAS + NADP; 1*NADPH*beta_keto_C4_acyl_ACP_FAS;  // modifiers: G005
  J009: D_3_hydroxy_C4_acyl_ACP_FAS => X025 + H2O; 1*D_3_hydroxy_C4_acyl_ACP_FAS;  // modifiers: G005
  J010: NADH + X025 => C4_acyl_ACP_FAS + NAD; 1*NADH*X025;  // modifiers: G005
  J011: C4_acyl_ACP_FAS + malonyl_CoA => malonyl_C4_acyl_ACP_FAS + coenzyme_A; 1*C4_acyl_ACP_FAS*malonyl_CoA;  // modifiers: G005
  J012: malonyl_C4_acyl_ACP_FAS => beta_keto_C6_acyl_ACP_FAS + CO2; 1*malonyl_C4_acyl_ACP_FAS;  // modifiers: G005
  J013: NADPH + beta_keto_C6_acyl_ACP_FAS => D_3_hydroxy_C6_acyl_ACP_FAS + NADP; 1*NADPH*beta_keto_C6_acyl_ACP_FAS;  // modifiers: G005
  J014: D_3_hydroxy_C6_acyl_ACP_FAS => X033 + H2O; 1*D_3_hydroxy_C6_acyl_ACP_FAS;  // modifiers: G005
  J015: NADH + X033 => C6_acyl_ACP_FAS + NAD; 1*NADH*X033;  // modifiers: G005
  J016: C6_acyl_ACP_FAS + malonyl_CoA => malonyl_C6_acyl_ACP_FAS + coenzyme_A; 1*C6_acyl_ACP_FAS*malonyl_CoA;  // modifiers: G005
  J017: malonyl_C6_acyl_ACP_FAS => beta_keto_C8_acyl_ACP_FAS + CO2; 1*malonyl_C6_acyl_ACP_FAS;  // modifiers: G005
  J018: NADPH + beta_keto_C8_acyl_ACP_FAS => D_3_hydroxy_C8_acyl_ACP_FAS + NADP; 1*NADPH*beta_keto_C8_acyl_ACP_FAS;  // modifiers: G005
  J019: D_3_hydroxy_C8_acyl_ACP_FAS => X038 + H2O; 1*D_3_hydroxy_C8_acyl_ACP_FAS;  // modifiers: G005
  J020: NADH + X038 => C8_acyl_ACP_FAS + NAD; 1*NADH*X038;  // modifiers: G005
  J021: C8_acyl_ACP_FAS + malonyl_CoA => malonyl_C8_acyl_ACP_FAS + coenzyme_A; 1*C8_acyl_ACP_FAS*malonyl_CoA;  // modifiers: G005
  J022: malonyl_C8_acyl_ACP_FAS => beta_keto_C10_acyl_ACP_FAS + CO2; 1*malonyl_C8_acyl_ACP_FAS;  // modifiers: G005
  J023: NADPH + beta_keto_C10_acyl_ACP_FAS => D_3_hydroxy_C10_acyl_ACP_FAS + NADP; 1*NADPH*beta_keto_C10_acyl_ACP_FAS;  // modifiers: G005
  J024: D_3_hydroxy_C10_acyl_ACP_FAS => X043 + H2O; 1*D_3_hydroxy_C10_acyl_ACP_FAS;  // modifiers: G005
  J025: NADH + X043 => C10_acyl_ACP_FAS + NAD; 1*NADH*X043;  // modifiers: G005
  J026: C10_acyl_ACP_FAS + malonyl_CoA => malonyl_C10_acyl_ACP_FAS + coenzyme_A; 1*C10_acyl_ACP_FAS*malonyl_CoA;  // modifiers: G005
  J027: malonyl_C10_acyl_ACP_FAS => beta_keto_C12_acyl_ACP_FAS + CO2; 1*malonyl_C10_acyl_ACP_FAS;  // modifiers: G005
  J028: NADPH + beta_keto_C12_acyl_ACP_FAS => D_3_hydroxy_C12_acyl_ACP_FAS + NADP; 1*NADPH*beta_keto_C12_acyl_ACP_FAS;  // modifiers: G005
  J029: D_3_hydroxy_C12_acyl_ACP_FAS => X048 + H2O; 1*D_3_hydroxy_C12_acyl_ACP_FAS;  // modifiers: G005
  J030: NADH + X048 => C12_acyl_ACP_FAS + NAD; 1*NADH*X048;  // modifiers: G005
  J031: C12_acyl_ACP_FAS + malonyl_CoA => malonyl_C12_acyl_ACP_FAS + coenzyme_A; 1*C12_acyl_ACP_FAS*malonyl_CoA;  // modifiers: G005
  J032: malonyl_C12_acyl_ACP_FAS => beta_keto_C14_acyl_ACP_FAS + CO2; 1*malonyl_C12_acyl_ACP_FAS;  // modifiers: G005
  J033: NADPH + beta_keto_C14_acyl_ACP_FAS => D_3_hydroxy_C14_acyl_ACP_FAS + NADP; 1*NADPH*beta_keto_C14_acyl_ACP_FAS;  // modifiers: G005
  J034: D_3_hydroxy_C14_acyl_ACP_FAS => X053 + H2O; 1*D_3_hydroxy_C14_acyl_ACP_FAS;  // modifiers: G005
  J035: NADH + X053 => C14_acyl_ACP_FAS + NAD; 1*NADH*X053;  // modifiers: G005
  J036: C14_acyl_ACP_FAS + malonyl_CoA => malonyl_C14_acyl_ACP_FAS + coenzyme_A; 1*C14_acyl_ACP_FAS*malonyl_CoA;  // modifiers: G005
  J037: malonyl_C14_acyl_ACP_FAS => beta_keto_C16_acyl_ACP_FAS + CO2; 1*malonyl_C14_acyl_ACP_FAS;  // modifiers: G005
  J038: NADPH + beta_keto_C16_acyl_ACP_FAS => D_3_hydroxy_C16_acyl_ACP_FAS + NADP; 1*NADPH*beta_keto_C16_acyl_ACP_FAS;  // modifiers: G005
  J039: D_3_hydroxy_C16_acyl_ACP_FAS => X058 + H2O; 1*D_3_hydroxy_C16_acyl_ACP_FAS;  // modifiers: G005
  J040: NADH + X058 => C16_acyl_ACP_FAS + NAD; 1*NADH*X058;  // modifiers: G005
  J041: C16_acyl_ACP_FAS + malonyl_CoA => malonyl_C16_acyl_ACP_FAS + coenzyme_A; 1*C16_acyl_ACP_FAS*malonyl_CoA;  // modifiers: G005
  J042: malonyl_C16_acyl_ACP_FAS => beta_keto_C18_acyl_ACP_FAS + CO2; 1*malonyl_C16_acyl_ACP_FAS;  // modifiers: G005
  J043: NADPH + beta_keto_C18_acyl_ACP_FAS => D_3_hydroxy_C18_acyl_ACP_FAS + NADP; 1*NADPH*beta_keto_C18_acyl_ACP_FAS;  // modifiers: G005
  J044: D_3_hydroxy_C18_acyl_ACP_FAS => X063 + H2O; 1*D_3_hydroxy_C18_acyl_ACP_FAS;  // modifiers: G005
  J045: NADH + X063 => C18_acyl_ACP_FAS + NAD; 1*NADH*X063;  // modifiers: G005
  J046: C18_acyl_ACP_FAS + malonyl_CoA => malonyl_C18_acyl_ACP_FAS + coenzyme_A; 1*C18_acyl_ACP_FAS*malonyl_CoA;  // modifiers: G005
  J047: malonyl_C18_acyl_ACP_FAS => beta_keto_C20_acyl_ACP_FAS + CO2; 1*malonyl_C18_acyl_ACP_FAS;  // modifiers: G005
  J048: NADPH + beta_keto_C20_acyl_ACP_FAS => D_3_hydroxy_C20_acyl_ACP_FAS + NADP; 1*NADPH*beta_keto_C20_acyl_ACP_FAS;  // modifiers: G005
  J049: D_3_hydroxy_C20_acyl_ACP_FAS => X068 + H2O; 1*D_3_hydroxy_C20_acyl_ACP_FAS;  // modifiers: G005
  J050: NADH + X068 => C20_acyl_ACP_FAS + NAD; 1*NADH*X068;  // modifiers: G005
  J051: C20_acyl_ACP_FAS + malonyl_CoA => malonyl_C20_acyl_ACP_FAS + coenzyme_A; 1*C20_acyl_ACP_FAS*malonyl_CoA;  // modifiers: G005
  J052: malonyl_C20_acyl_ACP_FAS => beta_keto_C22_acyl_ACP_FAS + CO2; 1*malonyl_C20_acyl_ACP_FAS;  // modifiers: G005
  J053: NADPH + beta_keto_C22_acyl_ACP_FAS => D_3_hydroxy_C22_acyl_ACP_FAS + NADP; 1*NADPH*beta_keto_C22_acyl_ACP_FAS;  // modifiers: G005
  J054: D_3_hydroxy_C22_acyl_ACP_FAS => X073 + H2O; 1*D_3_hydroxy_C22_acyl_ACP_FAS;  // modifiers: G005
  J055: NADH + X073 => C22_acyl_ACP_FAS + NAD; 1*NADH*X073;  // modifiers: G005
  J056: C22_acyl_ACP_FAS + malonyl_CoA => malonyl_C22_acyl_ACP_FAS + coenzyme_A; 1*C22_acyl_ACP_FAS*malonyl_CoA;  // modifiers: G005
  J057: malonyl_C22_acyl_ACP_FAS => beta_keto_C24_acyl_ACP_FAS + CO2; 1*malonyl_C22_acyl_ACP_FAS;  // modifiers: G005
  J058: NADPH + beta_keto_C24_acyl_ACP_FAS => D_3_hydroxy_C24_acyl_ACP_FAS + NADP; 1*NADPH*beta_keto_C24_acyl_ACP_FAS;  // modifiers: G005
  J059: D_3_hydroxy_C24_acyl_ACP_FAS => X078 + H2O; 1*D_3_hydroxy_C24_acyl_ACP_FAS;  // modifiers: G005
  J060: NADH + X078 => C24_acyl_ACP_FAS + NAD; 1*NADH*X078;  // modifiers: G005
  J061: C24_acyl_ACP_FAS + coenzyme_A => C24_acyl_S_CoA + ACP_FAS; 1*C24_acyl_ACP_FAS*coenzyme_A;  // modifiers: G005
  J062: C16_acyl_ACP_FAS + coenzyme_A => C16_acyl_S_CoA + ACP_FAS; 1*C16_acyl_ACP_FAS*coenzyme_A;  // modifiers: G005
  J063: acyl_carrier_protein + malonyl_CoA => malonyl_ACP + coenzyme_A; 1*acyl_carrier_protein*malonyl_CoA;  // modifiers: G006
  J064: C16_acyl_S_CoA + malonyl_ACP => coenzyme_A + beta_keto_C18_acyl_ACP + CO2; 1*C16_acyl_S_CoA*malonyl_ACP;  // modifiers: G007
  J065: NADPH + beta_keto_C18_acyl_ACP => D_3_hydroxy_C18_acyl_ACP + NADP; 1*NADPH*beta_keto_C18_acyl_ACP;  // modifiers: G008
  J066: NADPH + beta_keto_C18_acyl_ACP => D_3_hydroxy_C18_acyl_ACP + NADP; 1*NADPH*beta_keto_C18_acyl_ACP;  // modifiers: G009
  J067: NADPH + beta_keto_C18_acyl_ACP => D_3_hydroxy_C18_acyl_ACP + NADP; 1*NADPH*beta_keto_C18_acyl_ACP;  // modifiers: G010
  J068: D_3_hydroxy_C18_acyl_ACP => trans_delta_2_enoyl_C18_acyl_ACP + H2O; 1*D_3_hydroxy_C18_acyl_ACP;  // modifiers: G011
  J069: NADH + trans_delta_2_enoyl_C18_acyl_ACP => C18_acyl_ACP + NAD; 1*NADH*trans_delta_2_enoyl_C18_acyl_ACP;  // modifiers: G012
  J070: C18_acyl_ACP + malonyl_ACP => acyl_carrier_protein + beta_keto_C20_acyl_ACP + CO2; 1*C18_acyl_ACP*malonyl_ACP;  // modifiers: G013, G014
  J071: NADPH + beta_keto_C20_acyl_ACP => D_3_hydroxy_C20_acyl_ACP + NADP; 1*NADPH*beta_keto_C20_acyl_ACP;  // modifiers: G008
  J072: NADPH + beta_keto_C20_acyl_ACP => D_3_hydroxy_C20_acyl_ACP + NADP; 1*NADPH*beta_keto_C20_acyl_ACP;  // modifiers: G009
  J073: NADPH + beta_keto_C20_acyl_ACP => D_3_hydroxy_C20_acyl_ACP + NADP; 1*NADPH*beta_keto_C20_acyl_ACP;  // modifiers: G010
  J074: D_3_hydroxy_C20_acyl_ACP => trans_delta_2_enoyl_C20_acyl_ACP + H2O; 1*D_3_hydroxy_C20_acyl_ACP;  // modifiers: G011
  J075: NADH + trans_delta_2_enoyl_C20_acyl_ACP => C20_acyl_ACP + NAD; 1*NADH*trans_delta_2_enoyl_C20_acyl_ACP;  // modifiers: G012
  J076: C20_acyl_ACP + malonyl_ACP => acyl_carrier_protein + beta_keto_C22_acyl_ACP + CO2; 1*C20_acyl_ACP*malonyl_ACP;  // modifiers: G013, G014
  J077: NADPH + beta_keto_C22_acyl_ACP => D_3_hydroxy_C22_acyl_ACP + NADP; 1*NADPH*beta_keto_C22_acyl_ACP;  // modifiers: G008
  J078: NADPH + beta_keto_C22_acyl_ACP => D_3_hydroxy_C22_acyl_ACP + NADP; 1*NADPH*beta_keto_C22_acyl_ACP;  // modifiers: G009
  J079: NADPH + beta_keto_C22_acyl_ACP => D_3_hydroxy_C22_acyl_ACP + NADP; 1*NADPH*beta_keto_C22_acyl_ACP;  // modifiers: G010
  J080: D_3_hydroxy_C22_acyl_ACP => trans_delta_2_enoyl_C22_acyl_ACP + H2O; 1*D_3_hydroxy_C22_acyl_ACP;  // modifiers: G011
  J081: NADH + trans_delta_2_enoyl_C22_acyl_ACP => C22_acyl_ACP + NAD; 1*NADH*trans_delta_2_enoyl_C22_acyl_ACP;  // modifiers: G012
  J082: C22_acyl_ACP + malonyl_ACP => acyl_carrier_protein + beta_keto_C24_acyl_ACP + CO2; 1*C22_acyl_ACP*malonyl_ACP;  // modifiers: G013, G014
  J083: NADPH + beta_keto_C24_acyl_ACP => D_3_hydroxy_C24_acyl_ACP + NADP; 1*NADPH*beta_keto_C24_acyl_ACP;  // modifiers: G008
  J084: NADPH + beta_keto_C24_acyl_ACP => D_3_hydroxy_C24_acyl_ACP + NADP; 1*NADPH*beta_keto_C24_acyl_ACP;  // modifiers: G009
  J085: NADPH + beta_keto_C24_acyl_ACP => D_3_hydroxy_C24_acyl_ACP + NADP; 1*NADPH*beta_keto_C24_acyl_ACP;  // modifiers: G010
  J086: D_3_hydroxy_C24_acyl_ACP => trans_delta_2_enoyl_C24_acyl_ACP + H2O; 1*D_3_hydroxy_C24_acyl_ACP;  // modifiers: G011
  J087: NADH + trans_delta_2_enoyl_C24_acyl_ACP => C24_acyl_ACP + NAD; 1*NADH*trans_delta_2_enoyl_C24_acyl_ACP;  // modifiers: G012
  J088: C24_acyl_ACP + malonyl_ACP => acyl_carrier_protein + beta_keto_C26_acyl_ACP + CO2; 1*C24_acyl_ACP*malonyl_ACP;  // modifiers: G013, G014
  J089: NADPH + beta_keto_C26_acyl_ACP => D_3_hydroxy_C26_acyl_ACP + NADP; 1*NADPH*beta_keto_C26_acyl_ACP;  // modifiers: G008
  J090: NADPH + beta_keto_C26_acyl_ACP => D_3_hydroxy_C26_acyl_ACP + NADP; 1*NADPH*beta_keto_C26_acyl_ACP;  // modifiers: G009
  J091: NADPH + beta_keto_C26_acyl_ACP => D_3_hydroxy_C26_acyl_ACP + NADP; 1*NADPH*beta_keto_C26_acyl_ACP;  // modifiers: G010
  J092: D_3_hydroxy_C26_acyl_ACP => trans_delta_2_enoyl_C26_acyl_ACP + H2O; 1*D_3_hydroxy_C26_acyl_ACP;  // modifiers: G011
  J093: NADH + trans_delta_2_enoyl_C26_acyl_ACP => C26_acyl_ACP + NAD; 1*NADH*trans_delta_2_enoyl_C26_acyl_ACP;  // modifiers: G012
  J094: C26_acyl_ACP + malonyl_ACP => acyl_carrier_protein + beta_keto_C28_acyl_ACP + CO2; 1*C26_acyl_ACP*malonyl_ACP;  // modifiers: G013, G014
  J095: NADPH + beta_keto_C28_acyl_ACP => D_3_hydroxy_C28_acyl_ACP + NADP; 1*NADPH*beta_keto_C28_acyl_ACP;  // modifiers: G008
  J096: NADPH + beta_keto_C28_acyl_ACP => D_3_hydroxy_C28_acyl_ACP + NADP; 1*NADPH*beta_keto_C28_acyl_ACP;  // modifiers: G009
  J097: NADPH + beta_keto_C28_acyl_ACP => D_3_hydroxy_C28_acyl_ACP + NADP; 1*NADPH*beta_keto_C28_acyl_ACP;  // modifiers: G010
  J098: D_3_hydroxy_C28_acyl_ACP => trans_delta_2_enoyl_C28_acyl_ACP + H2O; 1*D_3_hydroxy_C28_acyl_ACP;  // modifiers: G011
  J099: NADH + trans_delta_2_enoyl_C28_acyl_ACP => C28_acyl_ACP + NAD; 1*NADH*trans_delta_2_enoyl_C28_acyl_ACP;  // modifiers: G012
  J100: C28_acyl_ACP + malonyl_ACP => acyl_carrier_protein + beta_keto_C30_acyl_ACP + CO2; 1*C28_acyl_ACP*malonyl_ACP;  // modifiers: G013, G014
  J101: NADPH + beta_keto_C30_acyl_ACP => D_3_hydroxy_C30_acyl_ACP + NADP; 1*NADPH*beta_keto_C30_acyl_ACP;  // modifiers: G008
  J102: NADPH + beta_keto_C30_acyl_ACP => D_3_hydroxy_C30_acyl_ACP + NADP; 1*NADPH*beta_keto_C30_acyl_ACP;  // modifiers: G009
  J103: NADPH + beta_keto_C30_acyl_ACP => D_3_hydroxy_C30_acyl_ACP + NADP; 1*NADPH*beta_keto_C30_acyl_ACP;  // modifiers: G010
  J104: D_3_hydroxy_C30_acyl_ACP => trans_delta_2_enoyl_C30_acyl_ACP + H2O; 1*D_3_hydroxy_C30_acyl_ACP;  // modifiers: G011
  J105: NADH + trans_delta_2_enoyl_C30_acyl_ACP => C30_acyl_ACP + NAD; 1*NADH*trans_delta_2_enoyl_C30_acyl_ACP;  // modifiers: G012
  J106: C30_acyl_ACP + malonyl_ACP => acyl_carrier_protein + beta_keto_C32_acyl_ACP + CO2; 1*C30_acyl_ACP*malonyl_ACP;  // modifiers: G013, G014
  J107: NADPH + beta_keto_C32_acyl_ACP => D_3_hydroxy_C32_acyl_ACP + NADP; 1*NADPH*beta_keto_C32_acyl_ACP;  // modifiers: G008
  J108: NADPH + beta_keto_C32_acyl_ACP => D_3_hydroxy_C32_acyl_ACP + NADP; 1*NADPH*beta_keto_C32_acyl_ACP;  // modifiers: G009
  J109: NADPH + beta_keto_C32_acyl_ACP => D_3_hydroxy_C32_acyl_ACP + NADP; 1*NADPH*beta_keto_C32_acyl_ACP;  // modifiers: G010
  J110: D_3_hydroxy_C32_acyl_ACP => trans_delta_2_enoyl_C32_acyl_ACP + H2O; 1*D_3_hydroxy_C32_acyl_ACP;  // modifiers: G011
  J111: NADH + trans_delta_2_enoyl_C32_acyl_ACP => C32_acyl_ACP + NAD; 1*NADH*trans_delta_2_enoyl_C32_acyl_ACP;  // modifiers: G012
  J112: C32_acyl_ACP + malonyl_ACP => acyl_carrier_protein + beta_keto_C34_acyl_ACP + CO2; 1*C32_acyl_ACP*malonyl_ACP;  // modifiers: G013, G014
  J113: NADPH + beta_keto_C34_acyl_ACP => D_3_hydroxy_C34_acyl_ACP + NADP; 1*NADPH*beta_keto_C34_acyl_ACP;  // modifiers: G008
  J114: NADPH + beta_keto_C34_acyl_ACP => D_3_hydroxy_C34_acyl_ACP + NADP; 1*NADPH*beta_keto_C34_acyl_ACP;  // modifiers: G009
  J115: NADPH + beta_keto_C34_acyl_ACP => D_3_hydroxy_C34_acyl_ACP + NADP; 1*NADPH*beta_keto_C34_acyl_ACP;  // modifiers: G010
  J116: D_3_hydroxy_C34_acyl_ACP => trans_delta_2_enoyl_C34_acyl_ACP + H2O; 1*D_3_hydroxy_C34_acyl_ACP;  // modifiers: G011
  J117: NADH + trans_delta_2_enoyl_C34_acyl_ACP => C34_acyl_ACP + NAD; 1*NADH*trans_delta_2_enoyl_C34_acyl_ACP;  // modifiers: G012
  J118: C34_acyl_ACP + malonyl_ACP => acyl_carrier_protein + beta_keto_C36_acyl_ACP + CO2; 1*C34_acyl_ACP*malonyl_ACP;  // modifiers: G013, G014
  J119: NADPH + beta_keto_C36_acyl_ACP => D_3_hydroxy_C36_acyl_ACP + NADP; 1*NADPH*beta_keto_C36_acyl_ACP;  // modifiers: G008
  J120: NADPH + beta_keto_C36_acyl_ACP => D_3_hydroxy_C36_acyl_ACP + NADP; 1*NADPH*beta_keto_C36_acyl_ACP;  // modifiers: G009
  J121: NADPH + beta_keto_C36_acyl_ACP => D_3_hydroxy_C36_acyl_ACP + NADP; 1*NADPH*beta_keto_C36_acyl_ACP;  // modifiers: G010
  J122: D_3_hydroxy_C36_acyl_ACP => trans_delta_2_enoyl_C36_acyl_ACP + H2O; 1*D_3_hydroxy_C36_acyl_ACP;  // modifiers: G011
  J123: NADH + trans_delta_2_enoyl_C36_acyl_ACP => C36_acyl_ACP + NAD; 1*NADH*trans_delta_2_enoyl_C36_acyl_ACP;  // modifiers: G012
  J124: C36_acyl_ACP + malonyl_ACP => acyl_carrier_protein + beta_keto_C38_acyl_ACP + CO2; 1*C36_acyl_ACP*malonyl_ACP;  // modifiers: G013, G014
  J125: NADPH + beta_keto_C38_acyl_ACP => D_3_hydroxy_C38_acyl_ACP + NADP; 1*NADPH*beta_keto_C38_acyl_ACP;  // modifiers: G008
  J126: NADPH + beta_keto_C38_acyl_ACP => D_3_hydroxy_C38_acyl_ACP + NADP; 1*NADPH*beta_keto_C38_acyl_ACP;  // modifiers: G009
  J127: NADPH + beta_keto_C38_acyl_ACP => D_3_hydroxy_C38_acyl_ACP + NADP; 1*NADPH*beta_keto_C38_acyl_ACP;  // modifiers: G010
  J128: D_3_hydroxy_C38_acyl_ACP => trans_delta_2_enoyl_C38_acyl_ACP + H2O; 1*D_3_hydroxy_C38_acyl_ACP;  // modifiers: G011
  J129: NADH + trans_delta_2_enoyl_C38_acyl_ACP => C38_acyl_ACP + NAD; 1*NADH*trans_delta_2_enoyl_C38_acyl_ACP;  // modifiers: G012
  J130: C38_acyl_ACP + malonyl_ACP => acyl_carrier_protein + beta_keto_C40_acyl_ACP + CO2; 1*C38_acyl_ACP*malonyl_ACP;  // modifiers: G013, G014
  J131: NADPH + beta_keto_C40_acyl_ACP => D_3_hydroxy_C40_acyl_ACP + NADP; 1*NADPH*beta_keto_C40_acyl_ACP;  // modifiers: G008
  J132: NADPH + beta_keto_C40_acyl_ACP => D_3_hydroxy_C40_acyl_ACP + NADP; 1*NADPH*beta_keto_C40_acyl_ACP;  // modifiers: G009
  J133: NADPH + beta_keto_C40_acyl_ACP => D_3_hydroxy_C40_acyl_ACP + NADP; 1*NADPH*beta_keto_C40_acyl_ACP;  // modifiers: G010
  J134: D_3_hydroxy_C40_acyl_ACP => trans_delta_2_enoyl_C40_acyl_ACP + H2O; 1*D_3_hydroxy_C40_acyl_ACP;  // modifiers: G011
  J135: NADH + trans_delta_2_enoyl_C40_acyl_ACP => C40_acyl_ACP + NAD; 1*NADH*trans_delta_2_enoyl_C40_acyl_ACP;  // modifiers: G012
  J136: C40_acyl_ACP + malonyl_ACP => acyl_carrier_protein + beta_keto_C42_acyl_ACP + CO2; 1*C40_acyl_ACP*malonyl_ACP;  // modifiers: G013, G014
  J137: NADPH + beta_keto_C42_acyl_ACP => D_3_hydroxy_C42_acyl_ACP + NADP; 1*NADPH*beta_keto_C42_acyl_ACP;  // modifiers: G008
  J138: NADPH + beta_keto_C42_acyl_ACP => D_3_hydroxy_C42_acyl_ACP + NADP; 1*NADPH*beta_keto_C42_acyl_ACP;  // modifiers: G009
  J139: NADPH + beta_keto_C42_acyl_ACP => D_3_hydroxy_C42_acyl_ACP + NADP; 1*NADPH*beta_keto_C42_acyl_ACP;  // modifiers: G010
  J140: D_3_hydroxy_C42_acyl_ACP => trans_delta_2_enoyl_C42_acyl_ACP + H2O; 1*D_3_hydroxy_C42_acyl_ACP;  // modifiers: G011
  J141: NADH + trans_delta_2_enoyl_C42_acyl_ACP => C42_acyl_ACP + NAD; 1*NADH*trans_delta_2_enoyl_C42_acyl_ACP;  // modifiers: G012
  J142: C42_acyl_ACP + malonyl_ACP => acyl_carrier_protein + beta_keto_C44_acyl_ACP + CO2; 1*C42_acyl_ACP*malonyl_ACP;  // modifiers: G013, G014
  J143: NADPH + beta_keto_C44_acyl_ACP => D_3_hydroxy_C44_acyl_ACP + NADP; 1*NADPH*beta_keto_C44_acyl_ACP;  // modifiers: G008
  J144: NADPH + beta_keto_C44_acyl_ACP => D_3_hydroxy_C44_acyl_ACP + NADP; 1*NADPH*beta_keto_C44_acyl_ACP;  // modifiers: G009
  J145: NADPH + beta_keto_C44_acyl_ACP => D_3_hydroxy_C44_acyl_ACP + NADP; 1*NADPH*beta_keto_C44_acyl_ACP;  // modifiers: G010
  J146: D_3_hydroxy_C44_acyl_ACP => trans_delta_2_enoyl_C44_acyl_ACP + H2O; 1*D_3_hydroxy_C44_acyl_ACP;  // modifiers: G011
  J147: NADH + trans_delta_2_enoyl_C44_acyl_ACP => C44_acyl_ACP + NAD; 1*NADH*trans_delta_2_enoyl_C44_acyl_ACP;  // modifiers: G012
  J148: C44_acyl_ACP + malonyl_ACP => acyl_carrier_protein + beta_keto_C46_acyl_ACP + CO2; 1*C44_acyl_ACP*malonyl_ACP;  // modifiers: G013, G014
  J149: NADPH + beta_keto_C46_acyl_ACP => D_3_hydroxy_C46_acyl_ACP + NADP; 1*NADPH*beta_keto_C46_acyl_ACP;  // modifiers: G008
  J150: NADPH + beta_keto_C46_acyl_ACP => D_3_hydroxy_C46_acyl_ACP + NADP; 1*NADPH*beta_keto_C46_acyl_ACP;  // modifiers: G009
  J151: NADPH + beta_keto_C46_acyl_ACP => D_3_hydroxy_C46_acyl_ACP + NADP; 1*NADPH*beta_keto_C46_acyl_ACP;  // modifiers: G010
  J152: D_3_hydroxy_C46_acyl_ACP => trans_delta_2_enoyl_C46_acyl_ACP + H2O; 1*D_3_hydroxy_C46_acyl_ACP;  // modifiers: G011
  J153: NADH + trans_delta_2_enoyl_C46_acyl_ACP => C46_acyl_ACP + NAD; 1*NADH*trans_delta_2_enoyl_C46_acyl_ACP;  // modifiers: G012
  J154: C46_acyl_ACP + malonyl_ACP => acyl_carrier_protein + beta_keto_C48_acyl_ACP + CO2; 1*C46_acyl_ACP*malonyl_ACP;  // modifiers: G013, G014
  J155: NADPH + beta_keto_C48_acyl_ACP => D_3_hydroxy_C48_acyl_ACP + NADP; 1*NADPH*beta_keto_C48_acyl_ACP;  // modifiers: G008
  J156: NADPH + beta_keto_C48_acyl_ACP => D_3_hydroxy_C48_acyl_ACP + NADP; 1*NADPH*beta_keto_C48_acyl_ACP;  // modifiers: G009
  J157: NADPH + beta_keto_C48_acyl_ACP => D_3_hydroxy_C48_acyl_ACP + NADP; 1*NADPH*beta_keto_C48_acyl_ACP;  // modifiers: G010
  J158: D_3_hydroxy_C48_acyl_ACP => trans_delta_2_enoyl_C48_acyl_ACP + H2O; 1*D_3_hydroxy_C48_acyl_ACP;  // modifiers: G011
  J159: NADH + trans_delta_2_enoyl_C48_acyl_ACP => C48_acyl_ACP + NAD; 1*NADH*trans_delta_2_enoyl_C48_acyl_ACP;  // modifiers: G012
  J160: C48_acyl_ACP + malonyl_ACP => acyl_carrier_protein + beta_keto_C50_acyl_ACP + CO2; 1*C48_acyl_ACP*malonyl_ACP;  // modifiers: G013, G014
  J161: NADPH + beta_keto_C50_acyl_ACP => D_3_hydroxy_C50_acyl_ACP + NADP; 1*NADPH*beta_keto_C50_acyl_ACP;  // modifiers: G008
  J162: NADPH + beta_keto_C50_acyl_ACP => D_3_hydroxy_C50_acyl_ACP + NADP; 1*NADPH*beta_keto_C50_acyl_ACP;  // modifiers: G009
  J163: NADPH + beta_keto_C50_acyl_ACP => D_3_hydroxy_C50_acyl_ACP + NADP; 1*NADPH*beta_keto_C50_acyl_ACP;  // modifiers: G010
  J164: D_3_hydroxy_C50_acyl_ACP => trans_delta_2_enoyl_C50_acyl_ACP + H2O; 1*D_3_hydroxy_C50_acyl_ACP;  // modifiers: G011
  J165: NADH + trans_delta_2_enoyl_C50_acyl_ACP => C50_acyl_ACP + NAD; 1*NADH*trans_delta_2_enoyl_C50_acyl_ACP;  // modifiers: G012
  J166: C50_acyl_ACP + malonyl_ACP => acyl_carrier_protein + beta_keto_C52_acyl_ACP + CO2; 1*C50_acyl_ACP*malonyl_ACP;  // modifiers: G013, G014
  J167: NADPH + beta_keto_C52_acyl_ACP => D_3_hydroxy_C52_acyl_ACP + NADP; 1*NADPH*beta_keto_C52_acyl_ACP;  // modifiers: G008
  J168: NADPH + beta_keto_C52_acyl_ACP => D_3_hydroxy_C52_acyl_ACP + NADP; 1*NADPH*beta_keto_C52_acyl_ACP;  // modifiers: G009
  J169: NADPH + beta_keto_C52_acyl_ACP => D_3_hydroxy_C52_acyl_ACP + NADP; 1*NADPH*beta_keto_C52_acyl_ACP;  // modifiers: G010
  J170: D_3_hydroxy_C52_acyl_ACP => trans_delta_2_enoyl_C52_acyl_ACP + H2O; 1*D_3_hydroxy_C52_acyl_ACP;  // modifiers: G011
  J171: NADH + trans_delta_2_enoyl_C52_acyl_ACP => C52_acyl_ACP + NAD; 1*NADH*trans_delta_2_enoyl_C52_acyl_ACP;  // modifiers: G012
  J172: C52_acyl_ACP + malonyl_ACP => acyl_carrier_protein + beta_keto_C54_acyl_ACP + CO2; 1*C52_acyl_ACP*malonyl_ACP;  // modifiers: G013, G014
  J173: NADPH + beta_keto_C54_acyl_ACP => D_3_hydroxy_C54_acyl_ACP + NADP; 1*NADPH*beta_keto_C54_acyl_ACP;  // modifiers: G008
  J174: NADPH + beta_keto_C54_acyl_ACP => D_3_hydroxy_C54_acyl_ACP + NADP; 1*NADPH*beta_keto_C54_acyl_ACP;  // modifiers: G009
  J175: NADPH + beta_keto_C54_acyl_ACP => D_3_hydroxy_C54_acyl_ACP + NADP; 1*NADPH*beta_keto_C54_acyl_ACP;  // modifiers: G010
  J176: D_3_hydroxy_C54_acyl_ACP => trans_delta_2_enoyl_C54_acyl_ACP + H2O; 1*D_3_hydroxy_C54_acyl_ACP;  // modifiers: G011
  J177: NADH + trans_delta_2_enoyl_C54_acyl_ACP => C54_acyl_ACP + NAD; 1*NADH*trans_delta_2_enoyl_C54_acyl_ACP;  // modifiers: G012
  J178: C54_acyl_ACP + malonyl_ACP => acyl_carrier_protein + beta_keto_C56_acyl_ACP + CO2; 1*C54_acyl_ACP*malonyl_ACP;  // modifiers: G013, G014
  J179: NADPH + beta_keto_C56_acyl_ACP => D_3_hydroxy_C56_acyl_ACP + NADP; 1*NADPH*beta_keto_C56_acyl_ACP;  // modifiers: G008
  J180: NADPH + beta_keto_C56_acyl_ACP => D_3_hydroxy_C56_acyl_ACP + NADP; 1*NADPH*beta_keto_C56_acyl_ACP;  // modifiers: G009
  J181: NADPH + beta_keto_C56_acyl_ACP => D_3_hydroxy_C56_acyl_ACP + NADP; 1*NADPH*beta_keto_C56_acyl_ACP;  // modifiers: G010
  J182: D_3_hydroxy_C56_acyl_ACP => trans_delta_2_enoyl_C56_acyl_ACP + H2O; 1*D_3_hydroxy_C56_acyl_ACP;  // modifiers: G011
  J183: NADH + trans_delta_2_enoyl_C56_acyl_ACP => C56_acyl_ACP + NAD; 1*NADH*trans_delta_2_enoyl_C56_acyl_ACP;  // modifiers: G012
  J184: C56_acyl_ACP + malonyl_ACP => acyl_carrier_protein + beta_keto_C58_acyl_ACP + CO2; 1*C56_acyl_ACP*malonyl_ACP;  // modifiers: G013, G014
  J185: NADPH + beta_keto_C58_acyl_ACP => D_3_hydroxy_C58_acyl_ACP + NADP; 1*NADPH*beta_keto_C58_acyl_ACP;  // modifiers: G008
  J186: NADPH + beta_keto_C58_acyl_ACP => D_3_hydroxy_C58_acyl_ACP + NADP; 1*NADPH*beta_keto_C58_acyl_ACP;  // modifiers: G009
  J187: NADPH + beta_keto_C58_acyl_ACP => D_3_hydroxy_C58_acyl_ACP + NADP; 1*NADPH*beta_keto_C58_acyl_ACP;  // modifiers: G010
  J188: D_3_hydroxy_C58_acyl_ACP => trans_delta_2_enoyl_C58_acyl_ACP + H2O; 1*D_3_hydroxy_C58_acyl_ACP;  // modifiers: G011
  J189: NADH + trans_delta_2_enoyl_C58_acyl_ACP => C58_acyl_ACP + NAD; 1*NADH*trans_delta_2_enoyl_C58_acyl_ACP;  // modifiers: G012
  J190: C52_acyl_ACP + NADP => X167 + NADPH; 1*C52_acyl_ACP*NADP;  // modifiers: G015, G016, G017
  J191: C54_acyl_ACP + NADP => X168 + NADPH; 1*C54_acyl_ACP*NADP;  // modifiers: G015, G016, G017
  J192: C58_acyl_ACP + NADP => X169 + NADPH; 1*C58_acyl_ACP*NADP;  // modifiers: G015, G016, G017
  J193: X167 + S_adenosyl_L_methionine => X171 + S_adenosyl_L_homocysteine; 1*X167*S_adenosyl_L_methionine;  // modifiers: G018
  J194: X171 + S_adenosyl_L_methionine => _19_31_cp_C54_acyl_ACP + S_adenosyl_L_homocysteine; 1*X171*S_adenosyl_L_methionine;  // modifiers: G019
  J195: _19_31_cp_C54_acyl_ACP + ATP => _19_31_cp_C54_acyl_ACP_AMP + pyrophosphate; 1*_19_31_cp_C54_acyl_ACP*ATP;  // modifiers: G020
  J196: C24_acyl_S_CoA + CO2 => _2_carboxyl_C24_acyl_CoA; 1*C24_acyl_S_CoA*CO2;  // modifiers: G021, G022, G003
  J197: _19_31_cp_C54_acyl_ACP_AMP + _2_carboxyl_C24_acyl_CoA => alpha_mycolate + AMP + coenzyme_A + acyl_carrier_protein; 1*_19_31_cp_C54_acyl_ACP_AMP*_2_carboxyl_C24_acyl_CoA;  // modifiers: G023
  J198: X168 + S_adenosyl_L_methionine => X177 + S_adenosyl_L_homocysteine; 1*X168*S_adenosyl_L_methionine;  // modifiers: G024
  J199: X177 + S_adenosyl_L_methionine => X178 + S_adenosyl_L_homocysteine; 1*X177*S_adenosyl_L_methionine;  // modifiers: G025
  J200: X178 + S_adenosyl_L_methionine => cis_methoxy_C57_meroacyl_cp_ACP + S_adenosyl_L_homocysteine; 1*X178*S_adenosyl_L_methionine;  // modifiers: G018
  J201: X178 + S_adenosyl_L_methionine => cis_methoxy_C57_meroacyl_cp_ACP + S_adenosyl_L_homocysteine; 1*X178*S_adenosyl_L_methionine;  // modifiers: G026
  J202: cis_methoxy_C57_meroacyl_cp_ACP + ATP => X180 + pyrophosphate; 1*cis_methoxy_C57_meroacyl_cp_ACP*ATP;  // modifiers: G020
  J203: X180 + _2_carboxyl_C24_acyl_CoA => cis_methoxy_mycolate + AMP + coenzyme_A + acyl_carrier_protein; 1*X180*_2_carboxyl_C24_acyl_CoA;  // modifiers: G023
  J204: X168 + S_adenosyl_L_methionine => X182 + S_adenosyl_L_homocysteine; 1*X168*S_adenosyl_L_methionine;  // modifiers: G027
  J205: X182 + S_adenosyl_L_methionine => X183 + S_adenosyl_L_homocysteine; 1*X182*S_adenosyl_L_methionine;  // modifiers: G024
  J206: X183 + S_adenosyl_L_methionine => X184 + S_adenosyl_L_homocysteine; 1*X183*S_adenosyl_L_methionine;  // modifiers: G025
  J207: X184 + S_adenosyl_L_methionine => X185 + S_adenosyl_L_homocysteine; 1*X184*S_adenosyl_L_methionine;  // modifiers: G026
  J208: X185 + ATP => X186 + pyrophosphate; 1*X185*ATP;  // modifiers: G020
  J209: X186 + _2_carboxyl_C24_acyl_CoA => trans_methoxy_mycolate + AMP + coenzyme_A + acyl_carrier_protein; 1*X186*_2_carboxyl_C24_acyl_CoA;  // modifiers: G023
  J210: X169 + S_adenosyl_L_methionine => X188 + S_adenosyl_L_homocysteine; 1*X169*S_adenosyl_L_methionine;  // modifiers: G024
  J211: X188 + NADP => X189 + NADPH; 1*X188*NADP;  // modifiers: G028
  J212: X189 + S_adenosyl_L_methionine => cis_keto_C60_meroacyl_ACP + S_adenosyl_L_homocysteine; 1*X189*S_adenosyl_L_methionine;  // modifiers: G018
  J213: cis_keto_C60_meroacyl_ACP + ATP => cis_keto_C60_meroacyl_ACP_AMP + pyrophosphate; 1*cis_keto_C60_meroacyl_ACP*ATP;  // modifiers: G020
  J214: cis_keto_C60_meroacyl_ACP_AMP + _2_carboxyl_C24_acyl_CoA => cis_keto_mycolate + AMP + coenzyme_A + acyl_carrier_protein; 1*cis_keto_C60_meroacyl_ACP_AMP*_2_carboxyl_C24_acyl_CoA;  // modifiers: G023
  J215: X188 + S_adenosyl_L_methionine => X193 + S_adenosyl_L_homocysteine; 1*X188*S_adenosyl_L_methionine;  // modifiers: G027
  J216: X193 + NADP => X194 + NADPH; 1*X193*NADP;  // modifiers: G028
  J217: X194 + S_adenosyl_L_methionine => trans_keto_C61_meroacyl_ACP + S_adenosyl_L_homocysteine; 1*X194*S_adenosyl_L_methionine;  // modifiers: G026
  J218: trans_keto_C61_meroacyl_ACP + ATP => trans_keto_C61_meroacyl_ACP_AMP + pyrophosphate; 1*trans_keto_C61_meroacyl_ACP*ATP;  // modifiers: G020
  J219: trans_keto_C61_meroacyl_ACP_AMP + _2_carboxyl_C24_acyl_CoA => trans_keto_mycolate + AMP + coenzyme_A + acyl_carrier_protein; 1*trans_keto_C61_meroacyl_ACP_AMP*_2_carboxyl_C24_acyl_CoA;  // modifiers: G023
  J220: coenzyme_A => ; 1*coenzyme_A;
  J221: apo_AcpM => ; 1*apo_AcpM;
  J222: ADP => ; 1*ADP;
  J223: acyl_carrier_protein => ; 1*acyl_carrier_protein;
  J224: AccB => ; 1*AccB;
  J225: biotin => ; 1*biotin;
  J226: ATP => ; 1*ATP;
  J227: pyrophosphate => ; 1*pyrophosphate;
  J228: AMP => ; 1*AMP;
  J229: BCCP_biotin => ; 1*BCCP_biotin;
  J230: HCO3 => ; 1*HCO3;
  J231: phosphate => ; 1*phosphate;
  J232: H => ; 1*H;
  J233: acetyl_CoA => ; 1*acetyl_CoA;
  J234: ACP_FAS => ; 1*ACP_FAS;
  J235: CO2 => ; 1*CO2;
  J236: NADPH => ; 1*NADPH;
  J237: NADP => ; 1*NADP;
  J238: H2O => ; 1*H2O;
  J239: NADH => ; 1*NADH;
  J240: NAD => ; 1*NAD;
  J241: S_adenosyl_L_methionine => ; 1*S_adenosyl_L_methionine;
  J242: S_adenosyl_L_homocysteine => ; 1*S_adenosyl_L_homocysteine;
  J243: alpha_mycolate => ; 1*alpha_mycolate;
  J244: cis_methoxy_mycolate => ; 1*cis_methoxy_mycolate;
  J245: trans_methoxy_mycolate => ; 1*trans_methoxy_mycolate;
  J246: cis_keto_mycolate => ; 1*cis_keto_mycolate;
  J247: trans_keto_mycolate => ; 1*trans_keto_mycolate;
end
